η_t := 0.75
# СП 131.13330.2025 Строительна климатология
# при φ=55%
c_p := 1006  # Дж/(кг*К)
η_к := 0.75
d_H0 := 12.2  # г/кг
R_a := 287.05  # Дж/(кг*К)
η_м := 0.98
k := 1.4
p_H0 := 101325  # Па
ρ_H0 := 1.3  # кг/м^3
M_1 := 0.8
H_1 := 200  # м
T_осН01 := 313.15  # K
Q_co1 := 3800  # Вт
M_2 := 1.8
H_2 := 15000  # м
T_осН02 := 313.15  # K
Q_co2 := 4400  # Вт
M_3 := 2.2
H_3 := 12000  # м
T_осН03 := 313.15  # K
Q_co3 := 4800  # Вт
# Параметры окружающей среды для режимов:
T_oc2 := 216.65  # K  # - Стратосфера
T_oc1 := T_осН01 - 0.0065*H_1 = 311.85  # K
T_oc3 := T_осН03 - 0.0065*H_3 = 235.15  # K
p_oc1 := p_H0*(1 - H_1/44300)^5.256 = 98943.6  # Па
p_oc2 := 22690*e^(-((H_2 - 11000)/6340)) = 12073.5  # Па
p_oc3 := p_H0*(1 - H_3/44300)^5.256 = 19256.9  # Па
ρ_oc1 := ρ_H0*(1 - H_1/44300)^4.256 = 1.2752  # кг/м^3
# кг/м^3 | кг/м^3
ρ_oc2 := 0.3649*e^(-((H_2 - 11000)/6340)) = 0.194165
ρ_oc3 := ρ_H0*(1 - H_3/44300)^4.256 = 0.338856
d_oc1 := d_H0*10^(-(H_1/5000)) = 11.1265  # г/кг
# Параметры торможения:
T_tor1 := T_oc1*(1 + 0.2*M_1^2) = 351.767  # K
p_tor1 := p_oc1*(1 + 0.2*M_1^2)^3.5 = 150824  # Па
# Примем:
ω := 15*deg
α := 50*deg
Given
tan(ω) == (M_2^2*sin(α)^2 - 1)/((1 + ((k - 1)/2)*M_2^2)*tan(α) + M_2^2*sin(α)*cos(α))
Find(α) = 0.895991
α_2 := 51.34*deg
α_3 := 41.27*deg
ω := 15*deg
p_осс2 := ((2*k/(k + 1))*M_2^2*sin(α_2)^2 - (k - 1)/(k + 1))*p_oc2 = 25815.5  # Па
T_occ2 := ((2/(k + 1))*(1/(M_2^2*sin(α_2)^2)) + (k - 1)/(k + 1))*((2*k/(k + 1))*M_2^2*sin(α_2)^2 - (k - 1)/(k + 1))*T_oc2 = 272.608  # K
M_sk2 := sqrt(((2/(k - 1)) + M_2^2*sin(α_2)^2)/((2*k/(k - 1))*(M_2^2*sin(α_2)^2 - 1)*sin(α_2 - ω))) = 1.31291
T_tor2 := T_occ2*(1 + (k - 1)*M_sk2^2/2) = 366.588  # K
p_tor2 := p_осс2*(1 + (k - 1)/2*M_sk2^2)^(k/(k - 1)) = 72798.1  # Па
p_осс3 := ((2*k/(k + 1))*M_3^2*sin(α_3)^2 - (k - 1)/(k + 1))*p_oc3 = 44100.3  # Па
T_occ3 := ((2/(k + 1))*(1/(M_3^2*sin(α_3)^2)) + (k - 1)/(k + 1))*((2*k/(k + 1))*M_3^2*sin(α_3)^2 - (k - 1)/(k + 1))*T_oc3 = 302.862  # K
M_sk3 := sqrt(((2/(k - 1)) + M_3^2*sin(α_3)^2)/((2*k/(k - 1))*(M_3^2*sin(α_3)^2 - 1)*sin(α_3 - ω))) = 1.44017
T_tor3 := T_occ3*(1 + (k - 1)*M_sk3^2/2) = 428.493  # K
p_tor3 := p_осс3*(1 + (k - 1)/2*M_sk3^2)^(k/(k - 1)) = 148556  # Па
# Расчёт режима 1:
# Баланс AT1:
Q_AT1 == G_1*c_p*(T_1 - T_2)
Q_AT1 == G_12*c_p(T_5 - T_12)
Δp_AT1 := 0.05*p_tor1 = 7541.19  # Па
G_12 == 0.25*G_1
β := 0.25
ε_1 := 0.85  # - Примем
T_2 == T_1 - ε_1*β*(T_1 - T_12)
T_5 == T_12 + (1 - β)*(T_1 - T_12)
T_12 == T_3
p_2 := p_tor1 - Δp_AT1 = 143283  # Па
T_3 == T_2*(1 - η_t(1 - (p_3/p_2)^((k - 1)/k)))
# Тогда:
T_1 := T_tor1
T_2 == (1 - ε_1*β)*T_1/(1 - ε_1*β*(1 - η_t(1 - (p_3/p_2)^((k - 1)/k))))
T_6 == (1 - β)*T_4 + βT_5
η_м*(T_2 - T_3) == T_7 - T_6
T_7 == T_6(1 + ((p_7/p_6)^((k - 1)/k) - 1)/η_к)
# Баланс АТ2:
G_4 == (1 - β)*G_1
T_8 := 323.15  # K
T_10 := 313.15  # K  # ГОСТ 58247-2018
G_bo := Q_co1/(c_p*(T_8 - T_10)) = 0.377734  # кг/с
G_8 == G_9 == G_10 == G_bo
# Для вентиляора примем:
π_v1 := 1.05
η_v1 := 0.6
T_9 := T_8*(1 + (π_v1^((k - 1)/k) - 1)/η_v1) = 330.71  # K
N_v1 := G_bo*c_p*(T_9 - T_8) = 2872.97  # Вт
Q_AT2 := Q_co1 + N_v1 = 6672.97  # Вт
T_4 == T_3 + Q_AT2/((1 - β)*G_1*c_p)
ε_2 := ε_1 = 0.85
# Для 6 точки смешения имеем:
T_4 == T_3 + Q_co1/((1 - β)*G_1*c_p)
T_6 == T_3 + β*ε_1*(T_1 - T_3) + Q_AT2/(G_1*c_p)
# Для вала:
η_м*G_1*c_p*(T_2 - T_3) == G_1*c_p(T_7 - T_6)
T_2 - T_3 == (1 - β*ε_1)*(T_1 - T_3)
# Для компрессора:
T_7 - T_6 == (T_6/η_к)*((p_7/p_6)^((k - 1)/k) - 1)
# Примем потери на холодном потоке:
p_4 == p_5 == 0.9*p_3
# Опишем функции
a := (k - 1)/k
A(p) := 1 - η_t*(1 - (p/p_2)^a)
T_2(p) := (1 - β*ε_1)*T_1/(1 - β*ε_1*A(p))
T_3(p) := A(p)*T_2(p)
T_4(p, G) := T_3(p) + Q_AT2/((1 - β)*G*c_p)
T_5(p) := T_3(p) + ε_1*(T_1 - T_3(p))
T_6(p, G) := (1 - β)*T_4(p, G) + β*T_5(p)
# Решим систему для p3 и G1 относительно АТ2 и вала:
p_3 := 84000  # Па
G_1 := 0.41  # кг/с  # - первое прибижение
Given
0 < p_3 < p_2
G_1 > 0
Q_AT2 == ε_2*c_p*min(G_bo, (1 - β)*G_1)*(T_9 - T_3(p_3))
η_м*(T_2(p_3) - T_3(p_3)) == T_6(p_3, G_1)/η_к*((p_oc1/(0.9*p_3))^a - 1)
Find(p_3, G_1) = [83720.3; 0.411452]
p_3 := 8.372*10^4
G_1 := 0.41
Δp_AT2 := 0.1*p_3
# Найдём температуры и давления в точках:
T_1 = 351.767  # K
p_1 := p_tor1 = 150824  # Па
T_2(p_3) = 341.918  # K
p_2 = 143283  # Па
T_3(p_3) = 305.422  # K
p_3 = 83720  # Па
T_4(p_3, G_1) = 326.993  # K
p_4 := p_3 - Δp_AT2 = 75348  # Па
T_5(p_3) = 344.815  # K
p_5 := p_3 - Δp_AT2 = 75348  # Па
T_6(p_3, G_1) = 331.449  # K
p_6 := p_3 - Δp_AT2 = 75348  # Па
T_7 := T_6(p_3, G_1) + (T_6(p_3, G_1)/η_к)*((p_oc1/(0.9*p_3))^a - 1) = 367.222  # K
p_7 := p_oc1 = 98943.6  # Па
T_8 = 323.15  # K
p_8 := p_H0 = 101325  # Па
T_9 = 330.71  # K
p_9 := 1.05*p_8 = 106391  # Па
T_10 = 313.15  # K
p_10 := p_H0 = 101325  # Па
T_11 := T_3(p_3) = 305.422  # K
p_11 := p_3 = 83720  # Па
T_12 := T_11 = 305.422  # K
p_12 := p_3 = 83720  # Па
N_t := G_1*c_p*(T_2(p_3) - T_3(p_3)) = 15053.4  # Вт
# Расчёт режима 2:
# Баланс AT1:
Q_AT1 == G_1*c_p*(T_1 - T_2)
Q_AT1 == G_12*c_p(T_5 - T_12)
Δp_AT1 := 0.05*p_tor2 = 3639.9  # Па
p_2 := p_tor2 - Δp_AT1 = 69158.2  # Па
# Тогда:
T_1 := T_tor2
# Баланс АТ2:
G_4 == (1 - β)*G_1
G_bo := Q_co2/(c_p*(T_8 - T_10)) = 0.437376  # кг/с
G_8 == G_9 == G_10 == G_bo
# Для вентиляора примем:
π_v1 := 1.05
η_v1 := 0.6
T_9 := T_8*(1 + (π_v1^((k - 1)/k) - 1)/η_v1) = 330.71  # K
N_v1 := G_bo*c_p*(T_9 - T_8) = 3326.6  # Вт
Q_AT2 := Q_co2 + N_v1 = 7726.6  # Вт
a := (k - 1)/k
# Опишем функции
A(p) := 1 - η_t*(1 - (p/p_2)^a)
T_2(p) := (1 - β*ε_1)*T_1/(1 - β*ε_1*A(p))
T_3(p) := A(p)*T_2(p)
T_4(p, G) := T_3(p) + Q_AT2/((1 - β)*G*c_p)
T_5(p) := T_3(p) + ε_1*(T_1 - T_3(p))
T_6(p, G) := (1 - β)*T_4(p, G) + β*T_5(p)
# Решим систему для p3 и G1 относительно АТ2 и вала:
p_3 := 84000  # Па
G_1 := 0.41  # кг/с  # - первое прибижение
Given
0 < p_3 < p_2
G_1 > 0
Q_AT2 == ε_2*c_p*min(G_bo, (1 - β)*G_1)*(T_9 - T_3(p_3))
η_м*(T_2(p_3) - T_3(p_3)) == T_6(p_3, G_1)/η_к*((p_осс2/(0.9*p_3))^a - 1)
Find(p_3, G_1) = [14942.8; 0.151335]
p_3 := 1.494*10^4
G_1 := 0.151
Δp_AT2 := 0.1*p_3
# Найдём температуры и давления в точках:
T_1 = 366.588  # K
p_1 := p_tor2 = 72798.1  # Па
T_2(p_3) = 342.045  # K
p_2 = 69158.2  # Па
T_3(p_3) = 251.089  # K
p_3 = 14940  # Па
T_4(p_3, G_1) = 318.908  # K
p_4 := p_3 - Δp_AT2 = 13446  # Па
T_5(p_3) = 349.263  # K
p_5 := p_3 - Δp_AT2 = 13446  # Па
T_6(p_3, G_1) = 326.497  # K
p_6 := p_3 - Δp_AT2 = 13446  # Па
T_7 := T_6(p_3, G_1) + (T_6(p_3, G_1)/η_к)*((p_осс2/(0.9*p_3))^a - 1) = 415.682  # K
p_7 := p_осс2 = 25815.5  # Па
T_8 = 323.15  # K
p_8 := p_H0 = 101325  # Па
T_9 = 330.71  # K
p_9 := 1.05*p_8 = 106391  # Па
T_10 = 313.15  # K
p_10 := p_H0 = 101325  # Па
T_11 := T_3(p_3) = 251.089  # K
p_11 := p_3 = 14940  # Па
T_12 := T_11 = 251.089  # K
p_12 := p_3 = 14940  # Па
N_t := G_1*c_p*(T_2(p_3) - T_3(p_3)) = 13816.6  # Вт
# Расчёт режима 3:
# Баланс AT1:
Q_AT1 == G_1*c_p*(T_1 - T_2)
Q_AT1 == G_12*c_p(T_5 - T_12)
Δp_AT1 := 0.05*p_tor3 = 7427.81  # Па
p_2 := p_tor3 - Δp_AT1 = 141128  # Па
# Тогда:
T_1 := T_tor3
# Баланс АТ2:
G_4 == (1 - β)*G_1
G_bo := Q_co3/(c_p*(T_8 - T_10)) = 0.477137  # кг/с
G_8 == G_9 == G_10 == G_bo
# Для вентиляора примем:
π_v1 := 1.05
η_v1 := 0.6
T_9 := T_8*(1 + (π_v1^((k - 1)/k) - 1)/η_v1) = 330.71  # K
N_v1 := G_bo*c_p*(T_9 - T_8) = 3629.02  # Вт
Q_AT2 := Q_co3 + N_v1 = 8429.02  # Вт
a := (k - 1)/k
A(p) := 1 - η_t*(1 - (p/p_2)^a)
# Опишем функции
T_2(p) := (1 - β*ε_1)*T_1/(1 - β*ε_1*A(p))
T_3(p) := A(p)*T_2(p)
T_4(p, G) := T_3(p) + Q_AT2/((1 - β)*G*c_p)
T_5(p) := T_3(p) + ε_1*(T_1 - T_3(p))
T_6(p, G) := (1 - β)*T_4(p, G) + β*T_5(p)
# Решим систему для p3 и G1 относительно АТ2 и вала:
p_3 := 84000  # Па
G_1 := 0.41  # кг/с  # - первое прибижение
Given
0 < p_3 < p_2
G_1 > 0
Q_AT2 == ε_2*c_p*min(G_bo, (1 - β)*G_1)*(T_9 - T_3(p_3))
η_м*(T_2(p_3) - T_3(p_3)) == T_6(p_3, G_1)/η_к*((p_осс3/(0.9*p_3))^a - 1)
Find(p_3, G_1) = [21581.7; 0.224557]
p_3 := 2.158*10^4
G_1 := 0.225
Δp_AT2 := 0.1*p_3
# Найдём температуры и давления в точках:
T_1 = 428.493  # K
p_1 := p_tor3 = 148556  # Па
T_2(p_3) = 395.276  # K
p_2 = 141128  # Па
T_3(p_3) = 272.177  # K
p_3 = 21580  # Па
T_4(p_3, G_1) = 321.829  # K
p_4 := p_3 - Δp_AT2 = 19422  # Па
T_5(p_3) = 405.046  # K
p_5 := p_3 - Δp_AT2 = 19422  # Па
# K | Па
T_6(p_3, G_1) = 342.633
p_6 := p_3 - Δp_AT2 = 19422
T_7 := T_6(p_3, G_1) + (T_6(p_3, G_1)/η_к)*((p_осс3/(0.9*p_3))^a - 1) = 463.252  # K
p_7 := p_осс3 = 44100.3  # Па
T_8 = 323.15  # K
p_8 := p_H0 = 101325  # Па
T_9 = 330.71  # K
p_9 := 1.05*p_8 = 106391  # Па
T_10 = 313.15  # K
p_10 := p_H0 = 101325  # Па
T_11 := T_3(p_3) = 272.177  # K
p_11 := p_3 = 21580  # Па
T_12 := T_11 = 272.177  # K
p_12 := p_3 = 21580  # Па
N_t := G_1*c_p*(T_2(p_3) - T_3(p_3)) = 27863.5  # Вт
